#ljcoul creat system and minimize

shell mkdir minimize ; cd ./minimize

variable    rad        equal 20
variable    boxlen     equal 100
variable    atom_mass  equal 12.011
variable    density    equal "1.38 * 1.0e-24"
variable    epsilon    equal 0.07
variable    sigma      equal 3.55005321204562
variable    cutofflj   equal 2.54*1.38^(1/3)
variable    screencoul equal 2.9

###################################################

variable    NA      equal 6.02e23
variable    mass    equal v_atom_mass/v_NA
variable    n_core  equal "floor(v_density*PI*v_rad^2*v_boxlen /v_mass)"
variable    n_shell equal "floor(v_density*v_boxlen^3/v_mass - v_n_core)"

units    	real
boundary 	p p p
newton      off
#lattice 	bcc 2.8665

region 		box   block 0.0 ${boxlen} 0.0 ${boxlen} 0.0 ${boxlen}

atom_style 	charge
create_box 	2 box

region 		core  cylinder  z $(v_boxlen/2) $(v_boxlen/2) ${rad} 0.0 EDGE
region 	   shell  cylinder  z $(v_boxlen/2) $(v_boxlen/2) ${rad} 0.0 EDGE side out

create_atoms 	1 random ${n_core}  13312    core
create_atoms 	2 random ${n_shell} 523462   shell

mass		* ${atom_mass}
set atom 1 charge 6.0

pair_style lj/cut ${cutofflj}
#pair_style lj/cut/coul/debye $(1/v_screencoul) ${cutofflj}  $(7*v_screencoul)
pair_coeff	* * ${epsilon} ${sigma}
pair_modify     mix arithmetic

#velocity        all create 300 61653 dist gaussian
#write_data  modle.data

#neighbor        2 bin
#neigh_modify    delay 10 every 1


#min_style       cg
#minimize        0.0 1.0e-8 10000 20000
#write_data  noover.data

shell cd ..
